OpenVSP model (file version 5), 3 components.
Geometry view with OpenVSP parameter names; values to 6 digits, angles in degrees, lengths in the model's unit.
Overall bounding box: X_Min=-0.276392 X_Len=4.53687 Y_Min=-6.71853 Y_Len=13.4371 Z_Min=-0.0547852 Z_Len=1.12079

Wing "Wing"
  location (X Y Z) -0.275 0 0, rotation 0 0 0
  symmetric about XZ
  bounding box size 1.02739 13.4371 0.402895
  totals: TotalSpan=13.452 TotalProjectedSpan=13.4371 TotalChord=0.564455 TotalArea=10.2485 TotalAR=17.6177
  root: chord 1.026, twist 0, airfoil file "NN 18-17 (PW-5 AIRFOIL)"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 BaseThickChord=0.167359 ThickChord=0.167359
  sections:
    n   Span   Root_Chord  Tip_Chord  Area       Sweep  Sweep_Location  Dihedral  Twist  Twist_Location  tip airfoil
    1   0.292  1.026       1          0.295796   0      0.35            2.7       0      0.25            as above
    2   2.928  1           0.792      2.62349    0      0.35            2.7       0      0.25            as above
    3   2.51   0.792       0.6        1.74696    0      0.35            2.7       0      0.25            as above
    4   0.1    0.6         0.6        0.06       2.8    0               2.7       0      0.25            as above
    5   0.123  0.6         0.579      0.0725085  6.9    0               2.7       0      0.25            as above
    6   0.142  0.579       0.535      0.079094   14.9   0               2.7       0      0.25            as above
    7   0.146  0.535       0.477      0.073876   19.1   0               2.7       0      0.25            as above
    8   0.162  0.477       0.404      0.071361   21.9   0               2.7       0      0.25            as above
    9   0.147  0.404       0.33       0.053949   24.7   0               2.7       0      0.25            as above
    10  0.078  0.33        0.279      0.023751   30.8   0               2.7       0      0.25            as above
    11  0.098  0.279       0.2        0.023471   34.5   0               2.7       0      0.25            as above

Wing "StabH"
  location (X Y Z) 3.767 0 0.091, rotation 0 -4.5 0
  symmetric about XZ
  bounding box size 0.4935 2.50541 0.0643511
  totals: TotalSpan=2.446 TotalProjectedSpan=2.446 TotalChord=0.495 TotalArea=1.21077 TotalAR=4.94141
  root: chord 0.495, twist 0, NACA 64-series A=1 IdealCl=0 ThickChord=0.12
  sections:
    n  Span   Root_Chord  Tip_Chord  Area      Sweep  Sweep_Location  Dihedral  Twist  Twist_Location  tip airfoil
    1  1.223  0.495       0.495      0.605385  0      0               0         0      0.25            as above

Wing "StabV"
  location (X Y Z) 3.109 0 0.097, rotation 90 0 0
  bounding box size 1.014 0.152146 0.969
  totals: TotalSpan=0.969 TotalProjectedSpan=0.969 TotalChord=0.5135 TotalArea=0.727224 TotalAR=1.29116
  root: chord 1.014, twist 0, airfoil file "FX 71-L-150/30"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 BaseThickChord=0.150036 ThickChord=0.150036
  sections:
    n  Span   Root_Chord  Tip_Chord  Area       Sweep  Sweep_Location  Dihedral  Twist  Twist_Location  tip airfoil
    1  0.839  1.014       0.569      0.664068   19.1   0               0         0      0.25            as above
    2  0.043  0.569       0.536      0.0237575  31.2   0               0         0      0.25            as above
    3  0.029  0.536       0.497      0.0149785  49.6   0               0         0      0.25            as above
    4  0.024  0.497       0.447      0.011328   62.4   0               0         0      0.25            as above
    5  0.022  0.447       0.375      0.009042   72.1   0               0         0      0.25            as above
    6  0.012  0.375       0.3        0.00405    80.8   0               0         0      0.25            as above
